ORIGIN := 1
h_1 := 0.1
Ψ_1(y) := e^y - e*y^2
h := h_1
Ψ_2(y) := y
h2 := h_1
Ψ_3(x) := -x^3 + 1
Ψ_4(x) := x^2
n := 11
m := 11
i := 1 .. n
x[i] := (i - 1)*h
j := 1 .. m
y[j] := (j - 1)*h
u[i, 1] := Ψ_3(x[i])
u[i, n] := Ψ_4(x[i])
u[1, j] := Ψ_1(y[j])
u[m, j] := Ψ_2(y[j])
i := 2 .. n - 1
j := 2 .. m - 1
l[j] := h*(u[n, j] - u[1, j])
u[i, j] := u[1, j] + (i - 1)*l[j]
u = [
    1, 1.07799, 1.11267, 1.10521, 1.0569, 0.969151, 0.843537, 0.681795, 0.485841, 0.257795, 0;
    0.999, 0.980189, 1.0214, 1.02469, 0.99121, 0.922236, 0.819184, 0.683615, 0.517257, 0.322015, 0.01;
    0.992, 0.88239, 0.930137, 0.944171, 0.92552, 0.875321, 0.79483, 0.685436, 0.548672, 0.386236, 0.04;
    0.973, 0.784592, 0.83887, 0.863649, 0.85983, 0.828406, 0.770476, 0.687256, 0.580088, 0.450456, 0.09;
    0.936, 0.686793, 0.747603, 0.783128, 0.79414, 0.78149, 0.746122, 0.689077, 0.611504, 0.514677, 0.16;
    0.875, 0.588994, 0.656336, 0.702607, 0.72845, 0.734575, 0.721769, 0.690897, 0.64292, 0.578897, 0.25;
    0.784, 0.491195, 0.565069, 0.622085, 0.66276, 0.68766, 0.697415, 0.692718, 0.674336, 0.643118, 0.36;
    0.657, 0.393396, 0.473801, 0.541564, 0.59707, 0.640745, 0.673061, 0.694538, 0.705752, 0.707338, 0.49;
    0.488, 0.295598, 0.382534, 0.461043, 0.53138, 0.59383, 0.648707, 0.696359, 0.737168, 0.771559, 0.64;
    0.271, 0.197799, 0.291267, 0.380521, 0.46569, 0.546915, 0.624354, 0.698179, 0.768584, 0.835779, 0.81;
    0, 0.1, 0.2, 0.3, 0.4, 0.5, 0.6, 0.7, 0.8, 0.9, 1
]
Iteratio(u, eps) :=
    n ← rows(u)
    m ← cols(u)
    r2 ← 10^10
    te ← 0
    k ← 0
    while r2 > te
        r1 ← r2
        r2 ← 0
        for i ∈ 2 .. n - 1
            for j ∈ 2 .. m - 1
                x ← 1/4*(u[i, j + 1] + u[i, j - 1] + u[i + 1, j] + u[i - 1, j])
                r ← |x - u[i, j]|
                if r2 ≤ r
                    r2 ← r
                u[i, j] ← x
            te ← eps*(1 - r2/r1)
            k ← k + 1
            if k > 1000
                return u
    return u
eps := 10^-6
Dirichlet(a, b, c, d, n, eps) :=
    l1 ← b - a
    l2 ← d - c
    h ← 11/(n - 1)
    m ← ceil(l2/h + 1)
    for i ∈ 1 .. n
        x[i] ← (i - 1)*h
        u[i, 1] ← Ψ_3(x[i])
        u[i, n] ← Ψ_4(x[i])
    for j ∈ 1 .. m
        y[j] ← (j - 1)*h
        u[1, j] ← Ψ_1(y[j])
        u[m, j] ← Ψ_2(y[j])
    for i ∈ 2 .. n - 1
        for j ∈ 2 .. m - 1
            x ← h*(u[n, j] - u[1, j])
            u[i, j] ← u[1, j] + (i - 1)*x
    u ← Iteratio(u, eps)
    return u
Dirichlet(0, 1, 0, 1, n, eps) = [
    1, -0.284955, 0, 0, 0, 0, 0, 0, 0, 0, 0;
    -1463.1, -1228.01, -1004, -800.412, -622.303, -470.812, -344.065, -238.294, -148.787, -70.5536, 1.21;
    -2927.2, -2444.64, -1987.58, -1575.35, -1217.99, -916.882, -667.156, -460.327, -286.301, -134.638, 4.84;
    -4391.3, -3635.78, -2926.32, -2295.42, -1757.44, -1311.57, -947.354, -649.557, -401.453, -186.538, 10.89;
    -5855.4, -4780.85, -3786.53, -2922.59, -2204.77, -1624.62, -1161.14, -789.099, -483.42, -220.954, 19.36;
    -7319.5, -5845.69, -4516.37, -3403.62, -2514.46, -1821, -1283.5, -862.283, -522.177, -233.217, 30.25;
    -8783.6, -6766.04, -5029.64, -3661.08, -2628.45, -1861.42, -1289.58, -854.364, -509.789, -219.99, 43.56;
    -10247.7, -7405.24, -5175.08, -3582.63, -2476.85, -1706.64, -1159.05, -755.807, -442.627, -180.514, 59.29;
    -11711.8, -7432.13, -4682.82, -3017.49, -1989.71, -1329.24, -884.18, -567.189, -324.399, -118.729, 77.44;
    -13175.9, -5928.65, -3106.57, -1814.83, -1135.24, -736.431, -481.246, -304.372, -169.054, -47.4431, 98.01;
    -1330, 0, 0, 0, 0, 0, 0, 0, 0, 0, 121
]
