ORIGIN := 1
ϕ0(x) := 0.5*(x^2 + 1)
n := 11
i := 1 .. n
m := 6
j := 1 .. m
ϕ1(x) := x*sin(2*x)
h := 0.1
Ψ1(t) := 0.5 + 3*t
x[i] := (i - 1)*h
u[1, i] := ϕ0(x[i])
v[i] := ϕ1(x[i])
Ψ2(t) := 1
t[j] := (j - 1)*h
u[j, 1] := Ψ1(t[j])
u[j, n] := Ψ2(t[j])
i := 2 .. n - 1
u[2, i] := u[1, i] + h*v[i]
progonka(a, b, c, d) :=
    γ[1] ← b[1]
    β[1] ← d[1]/γ[1]
    α[1] ← -c[1]/γ[1]
    n ← rows(b)
    for i ∈ 2 .. n - 1
        γ[i] ← b[i] + a[i]*α[i - 1]
        α[i] ← -c[i]/γ[i]
        β[i] ← (d[i] - a[i]*β[i - 1])/γ[i]
    γ[n] ← b[n] + a[n]*α[n - 1]
    β[n] ← (d[n] - a[n]*β[n - 1])/γ[n]
    x[n] ← β[n]
    for i ∈ n - 1, n - 2 .. 1
        x[i] ← α[i]*x[i + 1] + β[i]
    return x
fun(i, j, u) := u[j - 1, i] - 2*u[j, i]
i := 1 .. n - 2
b[i] := 3
a[i] := 1
c[i] := 1
a[1] := 0
c[n - 2] := 0
Setka(a, b, c, m, u) :=
    n ← rows(b) + 2
    for j ∈ 2 .. m - 1
        for i ∈ 2 .. n - 1
            f[i - 1] ← fun(i, j, u)
        xx ← progonka(a, b, c, f)
        for i ∈ 2 .. n - 1
            u[j + 1, i] ← xx[i - 1]
    return u
Setka(a, b, c, m, u) = [
    0.5, 0.505, 0.52, 0.545, 0.58, 0.625, 0.68, 0.745, 0.82, 0.905, 1;
    0.8, 0.506987, 0.527788, 0.561939, 0.608694, 0.667074, 0.735922, 0.813981, 0.899966, 0.992646, 1;
    1.1, -0.13904, -0.0918537, -0.120976, -0.124098, -0.144119, -0.152692, -0.189651, -0.161319, -0.306325, 1;
    1.4, 0.228263, 0.100278, 0.1824, 0.156414, 0.205248, 0.183154, 0.286596, 0.150341, 0.484985, 1;
    1.7, -0.206379, 0.0235702, -0.156741, -0.0391212, -0.162821, -0.0270307, -0.275086, 0.0894438, -0.455246, 1;
    2, 0.264523, -0.152549, 0.246262, -0.0903552, 0.25946, -0.157135, 0.449159, -0.353574, 0.583017, 1
]
