ORIGIN := 1
TOL := 10^-7
A := [3.55, 0.15, 0.18, 0.21; 0.11, 3.46, 0.16, 0.19; 0.12, 0.14, 3.37, 0.20; 0.10, 0.13, 0.17, 3.28]
B := [1.0834; 1.1239; 1.1607; 1.1938]
norm1(A) = 3.88
n := 4
j := 1 .. n
i := 1 .. n
k := 2 .. 11
C[i] := B[i]/A[i, i]
C = [0.305183; 0.324827; 0.344421; 0.363963]
b[i, j] := -A[i, j]/A[i, i]
b[i, i] := 0
b = [
    0, -0.0422535, -0.0507042, -0.0591549;
    -0.0317919, 0, -0.0462428, -0.0549133;
    -0.0356083, -0.041543, 0, -0.0593472;
    -0.0304878, -0.0396341, -0.0518293, 0
]
norm1(b) = 0.173415
xx[:, 1] := C
xx[:, k] := C + B*xx[:, k - 1]
xx = [
    0.305183, 1.83516, 8.81461, 40.6535, 185.896, 848.463, 3870.96, 17659, 80557.3, 367487, 1676401;
    0.324827, 1.8548, 8.83425, 40.6731, 185.916, 848.483, 3870.98, 17659, 80557.3, 367487, 1676401;
    0.344421, 1.8744, 8.85385, 40.6927, 185.935, 848.502, 3871, 17659, 80557.3, 367487, 1676401;
    0.363963, 1.89394, 8.87339, 40.7123, 185.955, 848.522, 3871.02, 17659.1, 80557.3, 367487, 1676401
]
