ORIGIN := 1
TOL := 10^-3
A := [2, 1.5, 3.5, 4.5; 1.5, 2, 2, 1.6; 3.5, 2, 2, 1.7; 4.5, 1.6, 1.7, 2]
E := identity(4)
E = [1, 0, 0, 0; 0, 1, 0, 0; 0, 0, 1, 0; 0, 0, 0, 1]
c := eigenvals(A)
v := eigenvec(A, c[1])
v_1 := eigenvec(A, c[2])
a := max(c)
v_2 := eigenvec(A, c[3])
v_3 := eigenvec(A, c[4])
v_4 := eigenvec(A, a)
c = [9.68631; 1.23393; 0.0872822; -3.00752]
v = [0.599854; 0.353272; 0.482615; 0.531467]
v_1 = [-0.315436; 0.808761; 0.263393; -0.420749]
v_2 = [0.0761493; -0.457939; 0.753403; -0.465701]
v_3 = [-0.731353; -0.106751; 0.360682; 0.56889]
v_4 = [0.599854; 0.353272; 0.482615; 0.531467]
a = 9.68631
